log			eq1.log append
variable name index P522013
####################################
# 1st stage equilibration
####################################
units		real
atom_style	full
boundary	p p p

bond_style		harmonic
angle_style		harmonic
dihedral_style	fourier
improper_style	cvff

# Turn off coulomb interaction
pair_style		lj/cut 3.0
pair_modify		mix arithmetic
special_bonds	amber
neighbor		2.0 bin
neigh_modify	delay 0
kspace_style	none

read_data       amorphous_polymer_${name}.lmps

dump            1 all xtc 1000 lmp_eq1.xtc
dump_modify     1 unwrap yes
thermo			1000
thermo_style	custom step temp press etotal ke pe ebond eangle edihed eimp evdwl ecoul elong vol density lx ly lz
thermo_modify	flush yes
restart			100000 lmp1.rst lmp2.rst

# Minimization
min_style	fire
minimize	1.0e-6 1.0e-7 10000 10000
#minimize 0.001 0.001 10000 100000
#reset_timestep  0

# 1st step: NVT
timestep	0.1
fix			NVT1 all nvt temp 100 100 100
run			20000
unfix		NVT1

# 2nd step: NVT, T rising
timestep	1.0
fix			SHAKE1 all shake 1e-4 1000 0 m 1.0
fix			NVT2 all nvt temp 100 1000 100
run			1000000
unfix		NVT2

# 3rd step: NPT, P and T const.
fix			NPT1 all npt temp 1000 1000 100 iso 0.1 0.1 1000
run			50000
unfix		NPT1

# 4th step: NPT, P rising
fix			NPT2 all npt temp 1000 1000 100 iso 0.1 500.0 1000
run			1000000
unfix		NPT2

write_data	eq1.data
clear


####################################
# 2nd stage equilibration
####################################
units		real
atom_style	full
boundary	p p p

bond_style		harmonic
angle_style		harmonic
dihedral_style	fourier
improper_style	cvff

pair_style		lj/cut/coul/long 8.0 12.0
pair_modify		mix arithmetic
special_bonds	amber
neighbor		3.0 bin
neigh_modify	delay 0 every 1
kspace_style	pppm 1e-6

read_data       eq1.data

dump            2 all xtc 1000 lmp_eq2_i.xtc
dump_modify     2 unwrap yes
thermo			1000
thermo_style	custom step temp press etotal ke pe ebond eangle edihed eimp evdwl ecoul elong vol density lx ly lz
thermo_modify	flush yes
restart			100000 lmp1.rst lmp2.rst

# 1st step: NPT
timestep		0.1
fix				NPTi all npt temp 1000 1000 100 iso 1.0 1.0 1000
run				20000
unfix			NPTi

# 2nd step: NPT, T decreasing
timestep		1.0
fix				SHAKE2 all shake 1e-4 1000 0 m 1.0
fix			    NPTs all npt temp 1000 300 100 iso 1.0 1.0 1000
run			    5000000
unfix		    NPTs

undump          2
reset_timestep  0
dump            3 all xtc 1000 lmp_eq2.xtc
dump_modify     3 unwrap yes
#dump       		4 all custom 1000  lmp_eq2.dump  id type mol x y z vx vy vz # Output coordinates and velocity

# calculate rg
compute c2 all chunk/atom molecule nchunk once limit 0 ids once compress no
compute c3 all gyration/chunk c2
fix rg all ave/time 1 10000 10000 c_c3 file ${name}_Rg.data mode vector

# 3rd step: NPT
fix				NPTf all npt temp 300 300 100 iso 1.0 1.0 1000
run				8000000
unfix			NPTf
unfix rg

write_data	eq2.data
